*Heading
** Job name: 1d_fx_fy_mx_half_ar Model name: 1d-half
** Generated by: Abaqus/CAE 2021
*Preprint, echo=NO, model=NO, history=NO, contact=NO
**
** PARTS
**
*Part, name=Part-1
*End Part
**
**
** ASSEMBLY
**
*Assembly, name=Assembly
**
*Instance, name=Part-1-1, part=Part-1
          0.,           0.,           0.
          0.,           0.,           0.,           0., -1.00000001268805,           0., 89.9999992730282
*Node
      1,           0.,           0.,           0.
      2,           1.,           0.,           0.
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*Element, type=B31
  1,   1,   2
  2,   2,   3
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*Nset, nset=beam, generate
   1,  101,    1
*Elset, elset=beam, generate
   1,  100,    1
** Section: Section-1  Profile: Profile-1
*Beam Section, elset=beam, material=material_1, temperature=GRADIENTS, section=RECT
0.5, 0.5
0.,0.,-1.
*End Instance
**
*Nset, nset=fixed, instance=Part-1-1
 1,
*Nset, nset=free, instance=Part-1-1
 101,
*End Assembly
**
** MATERIALS
**
*Material, name=material_1
*Elastic
1.92e6, 0.3
** ----------------------------------------------------------------
**
** STEP: Step-1
**
*Step, name=Step-1, nlgeom=YES
*Static
1., 1., 1e-05, 1.
**
** BOUNDARY CONDITIONS
**
** Name: BC-1 Type: Symmetry/Antisymmetry/Encastre
*Boundary
fixed, ENCASTRE
**
** LOADS
**
** Name: fx   Type: Concentrated force
*Cload, op=NEW
free, 1, 1e-06
** Name: fy   Type: Concentrated force
*Cload, op=NEW
free, 2, -1e-06
** Name: mx   Type: Moment
*Cload, op=NEW
free, 4, -1e-05
**
** OUTPUT REQUESTS
**
*Restart, write, frequency=0
**
** FIELD OUTPUT: F-Output-1
**
*Output, field
*Node Output
CF, PHILSM, PSILSM, RF, RM, RT, TF, U
UR, UT, V, VF, VR, VT
*Element Output, position=NODES, directions=YES
ALPHA, ALPHAN, BF, CENTMAG, CENTRIFMAG, CFAILURE, CORIOMAG, CS11, CTSHR, DAMAGEC, DAMAGEFC, DAMAGEFT, DAMAGEMC, DAMAGEMT, DAMAGESHR, DAMAGET
DMICRT, E, EE, EEQUT, ELEDEN, ELEN, ENER, ENRRTXFEM, ER, ERPRATIO, ESF1, GRAV, HP, HSNFCCRT, HSNFTCRT, HSNMCCRT
HSNMTCRT, IE, JK, LE, MISES, MISESMAX, MISESONLY, MMIXDME, MMIXDMI, NE, NFORC, NFORCSO, P, PE, PEEQ, PEEQMAX
PEEQT, PEMAG, PEQC, PRESSONLY, PS, ROTAMAG, S, SALPHA, SDEG, SE, SEE, SEP, SEPE, SEQUT, SF, SHRRATIO
SPE, SQEQ, SSAVG, TE, TEEQ, TEVOL, THE, TRIAX, TRNOR, TRSHR, TSHR, VE, VEEQ, VS, YIELDPOT
*Contact Output
BDSTAT, CDISP, CDISPETOS, CDSTRESS, CFORCE, CLINELOAD, CNAREA, CPOINTLOAD, CRSTS, CSDMG, CSMAXSCRT, CSMAXUCRT, CSQUADSCRT, CSQUADUCRT, CSTATUS, CSTRESS
CSTRESSERI, CSTRESSETOS, CTANDIR, DBS, DBSF, DBT, EFENRRTR, ENRRT, OPENBC, PPRESS
**
** FIELD OUTPUT: F-Output-2
**
*Node Output
CECHG, CECUR, COORD, EPOT, NT, PHILSM, PSILSM, RCHG
RECUR
*Element Output, directions=YES
CFAILURE, DAMAGEC, DAMAGEFC, DAMAGEFT, DAMAGEMC, DAMAGEMT, DAMAGESHR, DAMAGET, DMICRT, ECD, EFLX, ELEDEN, ELEN, ENER, ENRRTXFEM, EPG
ERPRATIO, ESOL, EVOL, HSNFCCRT, HSNFTCRT, HSNMCCRT, HSNMTCRT, IVOL, JK, MFL, MFLT, MMIXDME, MMIXDMI, NCURS, RD, SDEG
SHRRATIO, STH, SVOL, TEMP, VVF, VVFG, VVFN
*Contact Output
BDSTAT, CRSTS, CSDMG, CSMAXSCRT, CSMAXUCRT, CSQUADSCRT, CSQUADUCRT, CSTRESSERI, DBS, DBSF, DBT, ECD, ECDA, ECDT, ECDTA, EFENRRTR
ENRRT, OPENBC, SJD, SJDA, SJDT, SJDTA
**
** HISTORY OUTPUT: H-Output-1
**
*Output, history, variable=PRESELECT
*End Step
