*Heading
** Job name: 3d_fx_fy_mx_half_ar_I_finer Model name: 3d-half_ar
** Generated by: Abaqus/CAE 2021
*Preprint, echo=NO, model=NO, history=NO, contact=NO
**
** PARTS
**
*Part, name=beam
*End Part
**
**
** ASSEMBLY
**
*Assembly, name=Assembly
**
*Instance, name=beam-1, part=beam
        0.25,        -0.25,           0.
*Node
      1,           0.,          0.5,         100.
      2,           0.,  0.449999988,         100.
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*Element, type=C3D8R
    1,  2212,  2213,  2224,  2223,     1,     2,    13,    12
    2,  2213,  2214,  2225,  2224,     2,     3,    14,    13
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*Nset, nset=beam, generate
     1,  24321,      1
*Elset, elset=beam, generate
     1,  20000,      1
** Section: Section-1
*Solid Section, elset=beam, material=mat-1
,
*End Instance
**
*Node
      1,           0.,           0.,         100.
*Nset, nset=fixed, instance=beam-1
  2201,  2202,  2203,  2204,  2205,  2206
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*Elset, elset=fixed, instance=beam-1
  1991,  1992,  1993,  1994,  1995,  1996
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*Nset, nset=m_Set-1
 1,
*Elset, elset=_free_S3, internal, instance=beam-1
     1,     2,     3,     4,     5,     6
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*Surface, type=ELEMENT, name=free
_free_S3, S3
*Elset, elset=_s_Surf-1_S3, internal, instance=beam-1
     1,     2,     3,     4,     5,     6
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*Surface, type=ELEMENT, name=s_Surf-1
_s_Surf-1_S3, S3
** Constraint: Constraint-1
*Coupling, constraint name=Constraint-1, ref node=m_Set-1, surface=s_Surf-1
*Distributing, weighting method=UNIFORM
*End Assembly
**
** MATERIALS
**
*Material, name=mat-1
*Elastic
1.92e6, 0.3
**
** BOUNDARY CONDITIONS
**
** Name: BC-1 Type: Symmetry/Antisymmetry/Encastre
*Boundary
fixed, ENCASTRE
** ----------------------------------------------------------------
**
** STEP: Step-1
**
*Step, name=Step-1, nlgeom=YES
*Static
0.01, 1., 1e-05, 1.
**
** LOADS
**
** Name: fx   Type: Surface traction
*Dsload, op=NEW, follower=NO, constant resultant=YES
free, TRVEC, -1e-06, 1., 0., 0.
** Name: fy   Type: Surface traction
*Dsload, op=NEW, follower=NO, constant resultant=YES
free, TRVEC, -1e-06, 0., 1., 0.
** Name: mx   Type: Moment
*Cload
m_Set-1, 4, -1e-05
**
** OUTPUT REQUESTS
**
*Restart, write, frequency=0
**
** FIELD OUTPUT: F-Output-2
**
*Output, field
*Node Output
U, UR, UT
*Element Output, position=NODES, directions=YES
E, LE, MISES, NE, NFORC, NFORCSO, S, SF
**
** FIELD OUTPUT: F-Output-1
**
*Element Output, directions=YES
ELEDEN, ELEN, ENER, NFORC, NFORCSO
**
** HISTORY OUTPUT: H-Output-1
**
*Output, history, variable=PRESELECT
*End Step
